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p := 10^-12
n := 10^-9
u := 10^-6
m := 10^-3
k := 10^3
M := 10^6
F_SW := 250 k
V_IN_MAX := 60
V_IN_MIN := 16
V_IN := 22.2
V_OUT := 12
I_OUT := 6
# расчет | R_T | задающего частоту
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R_T := (1/F_SW - 450 n)/(284 p) = 12.5 k
R_T := 12.4 k
# расчет | L
I_PP := 0.4*I_OUT = 2.4
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L := V_OUT/(I_PP*F_SW)*(1 - V_OUT/V_IN_MAX) = 16 u
L := 15 u
# расчет | R_S | current sense резистора
V_CS_TH := 0.11
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R_S := V_CS_TH/(I_OUT + V_OUT/(2*L*F_SW)*(1 + V_OUT/V_IN_MIN)) = 12.5 m
R_S := 10 m
# расчет | C_RAMP
g_m := 5 u
A := 10
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C_RAMP := g_m*L/(A*R_S) = 0.75 n
# расчет | C_OUT
ESR := 0.4 m  # ΔV_OUT  # - амплитуда пульсации напряжения
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ΔV_OUT(C_OUT) := I_PP*sqrt(ESR^2 + (1/(8*F_SW*C_OUT))^2)
# [plot: ΔV_OUT(C_OUT) (m) vs C_OUT (u)]
C_OUT := 22 u*12 = 264 u
# тогда:
ΔV_OUT(C_OUT) = 4.64572 m
C_OUT := 22 u*4 = 88 u
# тогда:
ΔV_OUT(C_OUT) = 13.6701 m
# расчет выходного делителя напряжния который задает | V_OUT | = 12
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R_FB1 := 1.21 k
R_FB2 := R_FB1*(V_OUT/1.215 - 1) = 10.7406 k
R_FB2 := 10.7 k
V_OUT := 1.215*(R_FB2/R_FB1 + 1) = 11.9592
# для | V_OUT | = 5
R_FB1_5V := 1.5 k
R_FB2_5V := R_FB1_5V*(5/1.215 - 1) = 4.67284 k
R_FB2_5V := 4.7 k
V_OUT_5V := 1.215*(R_FB2_5V/R_FB1_5V + 1) = 5.022
# расчет делителя напряжния UVLO
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R_UV2 := 500*V_IN_MAX = 30 k
R_UV2 := 33 k
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R_UV1 := 1.215*(R_UV2/(V_IN_MIN + (5 u*R_UV2) - 1.215)) = 2.68194 k
R_UV1 := 2.7 k
# расчет | R_RAMP
T := 1/F_SW = 4e-6
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VCC := 7.4
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I_OS := V_OUT/3*10 u = 39.864 u
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V_RAMP := V_OUT/V_IN*((V_IN - V_OUT)*g_m + I_OS)*T/C_RAMP = 0.261646
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R_RAMP := (VCC - V_RAMP)/(I_OS - 25 u) = 480.243 k
R_RAMP := 470 k
